<?xml version="1.0"?>

<propeller version="1.01" name="apc 6x4">
  <ixx>   0.0001 </ixx>
  <diameter unit="IN">   7.9 </diameter>
  <numblades> 2 </numblades>
  <minpitch> 30 </minpitch>
  <maxpitch> 30 </maxpitch>

  <table name="C_THRUST" type="internal">
     <tableData>
       0.0   0.1019
       0.1   0.0976
       0.2   0.0934
       0.3   0.0860
       0.4   0.0772
       0.5   0.0680
       0.6   0.0550
       0.7   0.0418
       0.8   0.0226
       1.0  -0.0077
       1.2  -0.0401
       1.4  -0.0721
     </tableData>
  </table>


  <table name="C_POWER" type="internal">
     <tableData>
       0.0   0.0684
       0.1   0.0684
       0.2   0.0667
       0.3   0.0651
       0.4   0.0614
       0.5   0.0563
       0.6   0.0517
       0.7   0.0434
       0.8   0.0354
       1.0   0.0127
       1.2  -0.0202
       1.4  -0.0609
       1.6  -0.1033
     </tableData>
  </table>

</propeller>


<!--
<?xml version="1.0"?>

<propeller name="apc 6x4">
  <ixx> 0.0001 </ixx>
  <diameter unit="IN"> 6.0 </diameter>
  <numblades> 2 </numblades>
  <minpitch> 30 </minpitch>
  <maxpitch> 30 </maxpitch>
  <minrpm> 0</minrpm>
  <maxrpm> 40000</maxrpm>

  <table name="C_THRUST" type="internal">
    <tableData>
	  0.0  0.0776
      0.1  0.0744
      0.2  0.0712
      0.3  0.0655
      0.4  0.0588
      0.5  0.0518
      0.6  0.0419
      0.7  0.0318
      0.8  0.0172
      1.0 -0.0058
      1.4 -0.0549
    </tableData>
  </table>

  <table name="C_POWER" type = "internal">
    <tableData>
	  0.0  0.0902
      0.1  0.0893
      0.2  0.0880
      0.3  0.0860
      0.4  0.0810
      0.5  0.0742
      0.6  0.0681
      0.7  0.0572
      0.8  0.0467
      1.0  0.0167
      1.4 -0.0803
    </tableData>
  </table>

</propeller> -->
